// COMSOL Multiphysics 6.3.0.290 model "ExtraLayoutv2.mph"
// Outline of the model tree

Parameters
  current = 0.01

Geometry
  geom1 "Geometry 1" (2D, length unit µm)
    imp1: Import (disabled)
      type = ecad
      filename = \\engin-labs.m.storage.umich.edu\engin-labs\home\ejmeasel\windat.v2\Documents\EECS 425\SOG_Pads.gds
      ecadtype = gds
      lengthunittype = gds
      fileunit = µm
      virtualgeometrytype = ecad
      objectstoimporttype = ecad
      layerstype = gds
      layername = {LAYER21 GLASS, LAYER24 DRIE, LAYER25 PAD}
      layerprop = {{LAYER21, Metal}, {LAYER24, Metal}, {LAYER25, Metal}}
      importlayer = {off, on, off}
      componentsstype = gds
      compattrtag = imp1.component
      cellstype = gds
      arcrecognitiontype = gds
      simplifytype = gds
    r9: Rectangle (disabled) | size = {40, 590}; pos = {420, 1200}
    r10: Rectangle (disabled) | size = {885, 40}; pos = {460, 1750}
    r18: Rectangle (disabled) | size = {10, 15}; pos = {1335, 1735}
    r13: Rectangle (disabled) | size = {10, 15}; pos = {1200, 1790}
    cha1: Chamfer (disabled) | point = r13(1) points 3, 4; r18(1) points 1, 2; dist = 5
    mir4: Mirror (disabled) | input = r10, r9, cha1(1), cha1(2); keep = on; pos = {0, 1200}; axis = {0, 1}
    r2: Rectangle (disabled) | size = {30, 20}; pos = {310, 1490}
    r3: Rectangle (disabled) | size = {10, 240}; pos = {330, 1510}
    r4: Rectangle (disabled) | size = {40, 40}; pos = {330, 1750}
    r5: Rectangle (disabled) | size = {10, 500}; pos = {360, 1250}
    r6: Rectangle (disabled) | size = {40, 40}; pos = {360, 1210}
    r7: Rectangle (disabled) | size = {10, 240}; pos = {390, 1250}
    r8: Rectangle (disabled) | size = {30, 20}; pos = {390, 1490}
    mir1: Mirror (disabled) | input = r2, r3, r4, r5, r6, r7, r8; keep = on; pos = {0, 1200}; axis = {0, 1}
    r11: Rectangle (disabled) | size = {900, 10}; pos = {300, 1894}; rot = -4
    mir2: Mirror (disabled) | input = r11; keep = on; pos = {1200, 0}; axis = {1, 0}
    r15: Rectangle (disabled) | size = {100, 100}; pos = {480, 1600}
    r16: Rectangle (disabled) | size = {760, 10}; pos = {580, 1644}; rot = 4
    mir3: Mirror (disabled) | input = r16; keep = on; pos = {1340, 0}; axis = {1, 0}
    r12: Rectangle (disabled) | size = {10, 37}; pos = {1195, 1805}
    r17: Rectangle (disabled) | size = {10, 36}; pos = {1335, 1696}
    cha2: Chamfer (disabled) | point = r17(1) points 3, 4; r12(1) points 1, 2; dist = 5
    mir5: Mirror (disabled) | input = cha2, mir2, mir3, r11, r15, r16; keep = on; pos = {0, 1200}; axis = {0, 1}
    r19: Rectangle (disabled) | size = {120, 570}; pos = {190, 540}
    r20: Rectangle (disabled) | size = {120, 120}; pos = {190, 1140}
    r21: Rectangle (disabled) | size = {120, 570}; pos = {190, 1290}
    r22: Rectangle (disabled) | size = {120, 340}; pos = {190, 190}
    r23: Rectangle (disabled) | size = {270, 120}; pos = {190, 190}
    r24: Rectangle (disabled) | size = {1460, 120}; pos = {470, 190}
    r25: Rectangle (disabled) | size = {270, 120}; pos = {1940, 190}
    r26: Rectangle (disabled) | size = {120, 340}; pos = {2090, 190}
    r27: Rectangle (disabled) | size = {120, 320}; pos = {2090, 540}
    r28: Rectangle (disabled) | size = {120, 660}; pos = {2090, 870}
    r29: Rectangle (disabled) | size = {120, 320}; pos = {2090, 1540}
    r30: Rectangle (disabled) | size = {120, 340}; pos = {2090, 1870}
    r31: Rectangle (disabled) | size = {270, 120}; pos = {1940, 2090}
    r32: Rectangle (disabled) | size = {1460, 120}; pos = {470, 2090}
    r33: Rectangle (disabled) | size = {270, 120}; pos = {190, 2090}
    r34: Rectangle (disabled) | size = {120, 340}; pos = {190, 1870}
    r35: Rectangle (disabled) | size = {30, 180}; pos = {310, 930}
    r36: Rectangle (disabled) | size = {30, 120}; pos = {310, 1140}
    r37: Rectangle (disabled) | size = {30, 180}; pos = {310, 1290}
    pol8: Polygon (disabled)
      source = table
      table = 
        {1940, 487.0689425049584}
        {1940, 310}
        {2090, 310}
        {2090, 476.674849139}
        {1940, 487.0689425049584}
    pol9: Polygon (disabled)
      source = table
      table = 
        {1930, 310}
        {1930, 487.761882063}
        {1205, 538}
        {1195, 538}
        {470, 487.761882063}
        {470, 310}
        {1930, 310}
    pol10: Polygon (disabled)
      source = table
      table = {{460, 310}, {460, 487.0689425049584}, {310, 476.674849139}, {310, 310}, {460, 310}}
    pol12: Polygon (disabled) | source = table; table = {{1375, 650}, {1375, 610}, {2080, 610}, {2080, 650}, {1375, 650}}
    pol13: Polygon (disabled)
      source = table
      table = 
        {480, 1700}
        {480, 700}
        {580, 700}
        {580, 776}
        {1335, 724}
        {1345, 724}
        {2080, 774.6014637611298}
        {2080, 870}
        {2090, 870}
        {2090, 1530}
        {2080, 1530}
        {2080, 1625.3985362388703}
        {1345, 1676}
        {1335, 1676}
        {580, 1624}
        {580, 1700}
        {480, 1700}
    mir6: Mirror (disabled) | input = pol10, pol12, pol8, pol9; keep = on; pos = {0, 1200}; axis = {0, 1}
    pol14: Polygon (disabled)
      source = table
      table = 
        {200, 1290}
        {340, 1290}
        {340, 1470}
        {310, 1470}
        {310, 1810}
        {310, 1843.75732421875}
        {310, 1843.75732421875}
        {310, 1873.3007318805649}
        {310, 1923.3251508613766}
        {1195, 1862}
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    r42: Rectangle (disabled) | size = {140, 120}; pos = {200, 1140}
    r38: Rectangle (disabled) | size = {60, 5}; pos = {290, 1195}
    r39: Rectangle (disabled) | size = {120, 600}; pos = {350, 600}
    r40: Rectangle (disabled) | size = {30, 320}; pos = {320, 600}
    r41: Rectangle (disabled) | size = {885, 60}; pos = {470, 600}
    pol15: Polygon (disabled)
      source = table
      table = 
        {320, 517.3985362388703}
        {320, 487.3741172580585}
        {1195, 548.5600777086303}
        {1195, 488}
        {1205, 488}
        {1205, 548.5600777086303}
        {2080, 487.3741172580585}
        {2080, 517.3985362388703}
        {1215, 577.8852285700069}
        {1215, 590}
        {1185, 590}
        {1185, 577.8852285700069}
        {320, 517.3985362388703}
    pol16: Polygon (disabled)
      source = table
      table = 
        {590, 765.3007318805649}
        {590, 735.2763128997532}
        {1325, 683.880106121273}
        {1325, 673}
        {1355, 673}
        {1355, 683.880106121273}
        {2080, 734.577044780318}
        {2080, 764.6014637611298}
        {1345, 713.2052569826495}
        {1345, 774}
        {1335, 774}
        {1335, 713.2052569826495}
        {590, 765.3007318805649}
    r43: Rectangle (disabled) | size = {10, 61.7323488944}; pos = {1165, 486.2676511056109}
    r44: Rectangle (disabled) | size = {10, 61.7323488944}; pos = {1225, 486.2676511056109}
    r45: Rectangle (disabled) | size = {10, 61.7218543046356}; pos = {1305, 714}
    r46: Rectangle (disabled) | size = {10, 61.7218543046}; pos = {1365, 714}
    mir7: Mirror (disabled)
      input = pol15, pol16, r38, r39, r40, r41, r43, r44, r45, r46
      keep = on
      pos = {0, 1200}
      axis = {0, 1}
    r47: Rectangle | size = {40, 10}; pos = {550, 1540}
    r48: Rectangle | size = {10, 30}; pos = {540, 1510}
    r49: Rectangle | size = {40, 10}; pos = {550, 1500}
    r50: Rectangle | size = {10, 20}; pos = {580, 1510}
    r51: Rectangle | size = {10, 10}; pos = {570, 1520}
    r52: Rectangle | size = {10, 50}; pos = {600, 1500}
    r53: Rectangle | size = {30, 10}; pos = {610, 1540}
    r54: Rectangle | size = {10, 20}; pos = {640, 1520}
    r55: Rectangle | size = {30, 10}; pos = {610, 1510}
    r56: Rectangle | size = {10, 10}; pos = {640, 1500}
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    pol17: Polygon
      source = table
      table = {{800, 1440}, {940, 1240}, {1080, 1440}, {1080, 1200}, {940, 1000}, {800, 1200}, {800, 1440}}
    sq1: Square | size = 2020; pos = {190, 190}
    dif1: Difference
      input = sq1
      input2 = pol17, r100, r101, r102, r103, r104, r105, r106, r107, r108, r109, r110, r111, r112, r113, r114, r115, r116, r117, r118, r119, r120, r121, r122, r123, r124, r125, r126, r127, r128, r129, r130, r131, r132, r133, r134, r135, r136, r137, r138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
      keepadd = on
    dif2: Difference | input = sq1; input2 = dif1, imp1
    dif3: Difference (disabled) | input = sq2; input2 = dif2
    sq2: Square (disabled) | size = 2400
    fin: Finalize "Form Union"

Materials
  mat1: Common "Si - Silicon (single-crystal, isotropic)" on all domains
    def: def "Basic"
      thermalexpansioncoefficient = 2.6e-6[1/K]
      heatcapacity = 700[J/(kg*K)]
      relpermittivity = 11.7
      density = 2329[kg/m^3]
      thermalconductivity = 130[W/(m*K)]
      electricconductivity = 20000
    Enu: Enu "Young's modulus and Poisson's ratio"
      E = 170e9[Pa]
      nu = 0.28

Physics
  solid: SolidMechanics on all domains
    dependent variable u = {u, v, w}
    d.d = 1[m]
    StructuralTransientBehavior.StructuralTransientBehavior = Quasistatic
    lemm1: LinearElasticModel "Linear Elastic Material 1" (default)
    free1: Free (default)
    init1: init "Initial Values 1" (default)
    fix1: Fixed "Fixed Constraint 1" on boundaries 178, 179, 362, 363
  ht: HeatTransfer "Heat Transfer in Solids" on all domains
    dependent variable T
    PhysicalModelProperty.dz = 1[m]
    PhysicalModelProperty.Tref = 700[K]
    solid1: SolidHeatTransferModel "Solid 1" (default)
    init1: init "Initial Values 1" (default)
    ins1: ThermalInsulation (default)
    temp1: TemperatureBoundary "Temperature 1" on boundaries 178, 179, 362, 363 | T0 = 700[K]
  ec: ConductiveMedia "Electric Currents" on all domains
    dependent variable V
    d.d = 1[m]
    cucn1: CurrentConservation (default)
    ein1: ElectricInsulation (default)
    init1: init "Initial Values 1" (default)
    term1: Terminal on no boundaries | I0 = current
    gnd1: Ground on boundaries 178, 179, 362, 363

Multiphysics
  te1: ThermalExpansion on all domains | Heat_physics = ht; Solid_physics = solid
  emh1: ElectromagneticHeating on all domains | EMHeat_physics = ec; Heat_physics = ht

Mesh
  mesh1 "Mesh 1" (physics-controlled)
    size: MeshSizeDefault | hauto = 4

Studies
  std1 "Study 1"
    param: Parametric "Parametric Sweep" | pname = current; plistarr = range(1,1,10)
    stat: Stationary

Solver configurations
  sol1 "Solution 1" (study std1)
    v1: Variables "Dependent Variables 1"
    s1: Stationary "Stationary Solver 1"
      p1: Parametric
      fc1: FullyCoupled
      d1: Direct "Direct (Merged)"

Datasets
  dset1: Solution | solution = sol1

Plots
  pg1: PlotGroup2D "Stress (solid)" | data = dset1
    surf1: Surface | expr = solid.misesGp
      def: Deform "Deformation" | expr = {u, v}; descr = Displacement field
  pg2: PlotGroup2D "Temperature (ht)" | data = dset1
    surf1: Surface | expr = T
  pg3: PlotGroup2D "Electric Potential (ec)" | data = dset1
    surf1: Surface | expr = V
    str1: Streamline on boundaries 1-20 | expr = {ec.Ex, ec.Ey}; udist = 0.02; maxsteps = 5000
      col1: Color "Color Expression 1" | expr = V
      filt1: Filter | expr = !isScalingSystemDomain
  pg4: PlotGroup2D "Electric Field (ec)" | data = dset1
    surf1: Surface | expr = ec.normE
    str1: Streamline on boundaries 1-20 | expr = {ec.Ex, ec.Ey}; udist = 0.02; maxsteps = 5000
      col1: Color "Color Expression 1" | expr = ec.normE
      filt1: Filter | expr = !isScalingSystemDomain
  pg5: PlotGroup2D "2D Plot Group 5" | data = dset1
    surf1: Surface | expr = solid.disp
      def1: Deform "Deformation 1" | expr = {u, v}
  pg6: PlotGroup2D "2D Plot Group 6" | data = dset1
    surf1: Surface | expr = T; descr = Temperature